<?xml version="1.0" ?>

<fdm_config release="Alpha" version="2.0">
    <flight_control file="FlightControl.xml"/>
    <system file="Effectors.xml"/>

    <mass_balance file="MassOpenFlight.xml"/>
    <ground_reactions file="Gear.xml"/>
    <propulsion file="Propulsion.xml"/>
    <metrics file="MetricsOpenFlight.xml"/>
    <aerodynamics file="AeroOpenFlight.xml"/>

    <system file="SensorImu.xml"/>
    <system file="SensorBaro.xml"/>
    <system file="SensorGps.xml"/>
    <system file="SensorPitot.xml"/>
</fdm_config>
